<?xml version="1.0"?>
<?xml-stylesheet type="text/xsl" href="http://jsbsim.sourceforge.net/JSBSim.xsl"?>
<fdm_config name="Tornado-Jsb" version="2.0" release="ALPHA"
   xmlns:xsi="http://www.w3.org/2001/XMLSchema-instance"
   xsi:noNamespaceSchemaLocation="http://jsbsim.sourceforge.net/JSBSim.xsd">

 <fileheader>
  <author> Aeromatic v 0.95 </author>
  <filecreationdate>2015-05-23</filecreationdate>
  <version>$Revision: 1.15 $</version>
  <description> Models a Tornado-Jsb. </description>
 </fileheader>

 <metrics>
   <wingarea  unit="M2">  47.60 </wingarea>
   <wingspan  unit="M" >  13.91 </wingspan>
   <wing_incidence>        0.00 </wing_incidence>
   <chord     unit="M" >   3.30 </chord>
   <htailarea unit="M2">  10.00 </htailarea>
   <htailarm  unit="M" >   5.00 </htailarm>
   <vtailarea unit="M2">   8.50 </vtailarea>
   <vtailarm  unit="M" >   6.00 </vtailarm>
   <location name="AERORP" unit="M">
     <x>  0.3 </x>
     <y>  0.0 </y>
     <z>  0.0 </z>
   </location>
   <location name="EYEPOINT" unit="M">
     <x> -4.0 </x>
     <y>  0.0 </y>
     <z>  0.0 </z>
   </location>
   <location name="VRP" unit="M">
     <x>  0.0 </x>
     <y>  0.0 </y>
     <z>  0.0 </z>
   </location>
 </metrics>

 <mass_balance>
   <ixx unit="KG*M2">  12100 </ixx>
   <iyy unit="KG*M2"> 188000 </iyy>
   <izz unit="KG*M2"> 198000 </izz>
   <emptywt unit="KG"> 14300 </emptywt>
   <location name="CG" unit="M">
     <x>  0.0 </x>
     <y>  0.0 </y>
     <z> -0.9 </z>
   </location>
 </mass_balance>

 <ground_reactions>
  <contact type="BOGEY" name="FRONT">
   <location unit="M">
     <x> -4.20 </x>
     <y>  0.00 </y>
     <z> -2.80 </z>
   </location>
   <static_friction>  0.80 </static_friction>
   <dynamic_friction> 0.50 </dynamic_friction>
   <rolling_friction> 0.02 </rolling_friction>
   <spring_coeff unit="LBS/FT">      40000 </spring_coeff>
   <damping_coeff unit="LBS/FT/SEC">  9000 </damping_coeff>
   <max_steer unit="DEG"> 45.00 </max_steer>
   <brake_group>NONE</brake_group>
   <retractable>1</retractable>
  </contact>

  <contact type="BOGEY" name="LEFT_MAIN">
   <location unit="M">
     <x>  1.00 </x>
     <y> -1.60 </y>
     <z> -2.72 </z>
   </location>
   <static_friction>  0.80 </static_friction>
   <dynamic_friction> 0.50 </dynamic_friction>
   <rolling_friction> 0.02 </rolling_friction>
   <spring_coeff unit="LBS/FT">      60000 </spring_coeff>
   <damping_coeff unit="LBS/FT/SEC">  9000 </damping_coeff>
   <max_steer unit="DEG">0</max_steer>
   <brake_group>LEFT</brake_group>
   <retractable>1</retractable>
  </contact>

  <contact type="BOGEY" name="RIGHT_MAIN">
   <location unit="M">
     <x>  1.00 </x>
     <y>  1.60 </y>
     <z> -2.72 </z>
   </location>
   <static_friction>  0.80 </static_friction>
   <dynamic_friction> 0.50 </dynamic_friction>
   <rolling_friction> 0.02 </rolling_friction>
   <spring_coeff unit="LBS/FT">      60000 </spring_coeff>
   <damping_coeff unit="LBS/FT/SEC">  9000 </damping_coeff>
   <max_steer unit="DEG">0</max_steer>
   <brake_group>RIGHT</brake_group>
   <retractable>1</retractable>
  </contact>

  <contact type="STRUCTURE" name="NOSE">
    <location unit="M">
     <x> -8.5 </x>
     <y>  0.0 </y>
     <z> -1.3 </z>
    </location>
    <static_friction>  1.00 </static_friction>
    <dynamic_friction> 1.00 </dynamic_friction>
    <spring_coeff unit="LBS/FT">      61700.00 </spring_coeff>
    <damping_coeff unit="LBS/FT/SEC"> 61700.00 </damping_coeff>
  </contact>

  <contact type="STRUCTURE" name="LEFT_WING">
    <location unit="M">
     <x>  2.9 </x>
     <y> -6.9 </y>
     <z> -0.9 </z>
    </location>
    <static_friction>  1.00 </static_friction>
    <dynamic_friction> 1.00 </dynamic_friction>
    <spring_coeff unit="LBS/FT">      61700.00 </spring_coeff>
    <damping_coeff unit="LBS/FT/SEC"> 61700.00 </damping_coeff>
  </contact>

  <contact type="STRUCTURE" name="RIGHT_WING">
    <location unit="M">
     <x>  2.9 </x>
     <y>  6.9 </y>
     <z> -0.9 </z>
    </location>
    <static_friction>  1.00 </static_friction>
    <dynamic_friction> 1.00 </dynamic_friction>
    <spring_coeff unit="LBS/FT">      61700.00 </spring_coeff>
    <damping_coeff unit="LBS/FT/SEC"> 61700.00 </damping_coeff>
  </contact>
 </ground_reactions>

 <propulsion>
   <engine file="RB199-34R">
    <location unit="M">
      <x>  4.0 </x>
      <y> -0.5 </y>
      <z> -0.9 </z>
    </location>
    <feed>0</feed>
    <feed>1</feed>
    <feed>2</feed>
    <feed>3</feed>
    <feed>4</feed>
    <feed>5</feed>
    <feed>6</feed>
    <feed>7</feed>
    <feed>8</feed>
    <thruster file="direct">
     <location unit="M">
      <x>  4.5 </x>
      <y> -0.5 </y>
      <z> -0.9 </z>
     </location>
     <orient unit="DEG">
       <pitch> 0.00 </pitch>
       <roll>  0.00 </roll>
       <yaw>   0.00 </yaw>
     </orient>
    </thruster>
  </engine>

   <engine file="RB199-34R">
    <location unit="M">
      <x>  4.0 </x>
      <y>  0.5 </y>
      <z> -0.9 </z>
    </location>
    <feed>0</feed>
    <feed>1</feed>
    <feed>2</feed>
    <feed>3</feed>
    <feed>4</feed>
    <feed>5</feed>
    <feed>6</feed>
    <feed>7</feed>
    <feed>8</feed>
    <thruster file="direct">
     <location unit="M">
      <x>  4.5 </x>
      <y>  0.5 </y>
      <z> -0.9 </z>
     </location>
     <orient unit="DEG">
       <pitch> 0.00 </pitch>
       <roll>  0.00 </roll>
       <yaw>   0.00 </yaw>
     </orient>
    </thruster>
  </engine>

  <!--0: Fuselage Tank Front-->
  <tank type="FUEL" number="0">
     <location unit="M">
       <x> -0.7 </x>
       <y>  0.0 </y>
       <z> -0.9 </z>
     </location>
     <priority>4</priority>
     <capacity unit="KG"> 2128 </capacity>
     <contents unit="KG"> 2128 </contents>
  </tank>
  <!--1: Wing Tank Left-->
  <tank type="FUEL" number="1">
     <location unit="M">
       <x>  1.3 </x>
       <y> -3.5 </y>
       <z> -0.5 </z>
     </location>
     <priority>3</priority>
     <capacity unit="KG"> 300 </capacity>
     <contents unit="KG"> 300 </contents>
  </tank>
  <!--2: Wing Tank Center-->
  <tank type="FUEL" number="2">
     <location unit="M">
       <x>  0.0 </x>
       <y>  0.0 </y>
       <z> -0.9 </z>
     </location>
     <priority>4</priority>
     <capacity unit="KG"> 182 </capacity>
     <contents unit="KG"> 182 </contents>
  </tank>
  <!--3: Wing Tank Right-->
  <tank type="FUEL" number="3">
     <location unit="M">
       <x>  1.3 </x>
       <y>  3.5 </y>
       <z> -0.5 </z>
     </location>
     <priority>3</priority>
     <capacity unit="KG"> 300 </capacity>
     <contents unit="KG"> 300 </contents>
  </tank>
  <!--4: Fuselage Tank Rear-->
  <tank type="FUEL" number="4">
     <location unit="M">
       <x>  0.0 </x>
       <y>  0.0 </y>
       <z> -0.9 </z>
     </location>
     <priority>4</priority>
     <capacity unit="KG"> 1862 </capacity>
     <contents unit="KG"> 1862 </contents>
  </tank>
  <!--5: External Left Wing Tank-->
  <tank type="FUEL" number="5">
     <location unit="M">
       <x>  0.6 </x>
       <y> -3.0 </y>
       <z> -1.4 </z>
     </location>
     <priority>1</priority>
     <capacity unit="KG"> 1200 </capacity>
     <contents unit="KG"> 1200 </contents>
  </tank>
  <!--6: External Center Tank-->
  <tank type="FUEL" number="6">
     <location unit="M">
       <x>  0.6 </x>
       <y> -0.5 </y>
       <z> -2.0 </z>
     </location>
     <priority>2</priority>
     <capacity unit="KG"> 1200 </capacity>
     <contents unit="KG"> 1200 </contents>
  </tank>
  <!--7: External Center Tank-->
  <tank type="FUEL" number="7">
     <location unit="M">
       <x>  0.6 </x>
       <y>  0.5 </y>
       <z> -2.0 </z>
     </location>
     <priority>2</priority>
     <capacity unit="KG"> 1200 </capacity>
     <contents unit="KG"> 1200 </contents>
  </tank>
  <!--8: External Right Wing Tank-->
  <tank type="FUEL" number="8">
     <location unit="M">
       <x>  0.6 </x>
       <y>  3.0 </y>
       <z> -1.4 </z>
     </location>
     <priority>1</priority>
     <capacity unit="KG"> 1200 </capacity>
     <contents unit="KG"> 1200 </contents>
  </tank>
  </propulsion>

    <system file="jsb-misc"/>
    <system file="jsb-electric"/>
    <flight_control file="Systems/jsb-controls"/>
    <aerodynamics file="Systems/jsb-aerodynamics.xml"/>

<!--
<output name="/tmp/tornado.csv" type="CSV" rate="10">
                        <property>aero/force/LIFT</property>
                        <property>aero/force/DRAG</property>
                        <property>aero/force/SIDE</property>
                        <property>aero/force/ROLL</property>
                        <property>aero/force/PITCH</property>
                        <property>aero/force/YAW</property>
</output>
-->
</fdm_config>
